** written by FreeCAD inp file writer for CalculiX,Abaqus meshes
** highest dimension mesh elements only.

** Nodes
*Node, NSET=Nall
1, -60.08411, -300, -60.542667
2, -60.08411, -4.032951772537e-014, -60.542667
3, 59.572491, -300, -60.542667
4, 59.572491, -4.032951772537e-014, -60.542667
5, 59.572491, -300, 59.888409
6, 59.572491, 3.989369434798e-014, 59.888409
7, -60.08411, -300, 59.888409
8, -60.08411, 3.989369434798e-014, 59.888409
9, -50.032955516, -300, 59.888409
10, -40.101457633, -300, 59.888409
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

** Volume elements
*Element, TYPE=C3D4, ELSET=Evolumes
4163, 5494, 5516, 4079, 5522
4164, 2795, 1069, 957, 2879
4165, 2331, 3793, 2869, 2339
4166, 2131, 2132, 4253, 4252
4167, 2273, 2022, 4674, 2274
4168, 1978, 3775, 3774, 5253
4169, 2075, 5522, 5516, 4080
4170, 3864, 3862, 2067, 3863
4171, 2312, 216, 1683, 2311
4172, 1160, 3119, 1205, 3050
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
** Define element set Eall
*ELSET, ELSET=Eall
Evolumes


***********************************************************
** Element sets for materials and FEM element type (solid, shell, beam, fluid)
** written by write_element_sets_material_and_femelement_type function
*ELSET,ELSET=SolidMaterialSolid
Evolumes

***********************************************************
** Node sets for fixed constraint
** written by write_node_sets_constraints_fixed function
** FemConstraintFixed
*NSET,NSET=FemConstraintFixed
2,
4,
6,
8,
53,
54,
55,
56,
57,
58,
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
***********************************************************
** Materials
** written by write_materials function
** Young's modulus unit is MPa = N/mm2
** FreeCAD material name: None
** SolidMaterial
*MATERIAL, NAME=SolidMaterial
*ELASTIC
1, 0.300

***********************************************************
** Sections
** written by write_femelementsets function
*SOLID SECTION, ELSET=SolidMaterialSolid, MATERIAL=SolidMaterial

***********************************************************
** At least one step is needed to run an CalculiX analysis of FreeCAD
** written by write_step_begin function
*STEP
*STATIC


***********************************************************
** Fixed Constraints
** written by write_constraints_fixed function
** FemConstraintFixed
*BOUNDARY
FemConstraintFixed,1
FemConstraintFixed,2
FemConstraintFixed,3


***********************************************************
** Node loads Constraints
** written by write_constraints_force function
*CLOAD
** FemConstraintForce
** node loads on shape: Pad:Face6
1,2,-1.0453029689444E-18
1,3,-1.5692086871424E-03
3,2,-7.7404749276866E-19
3,3,-1.1620000000000E-03
5,2,-1.3714817378263E-18
5,3,-2.0588682144734E-03
7,2,-7.7404749276866E-19
7,3,-1.1620000000000E-03
9,2,-2.5784871544322E-18
9,3,-3.8708245959601E-03
10,2,-2.2341757016877E-18
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

***********************************************************
** Outputs --> frd file
** written by write_outputs_types function
*NODE FILE
U
*EL FILE
S, E
** outputs --> dat file
*NODE PRINT , NSET=Nall
U
*EL PRINT , ELSET=Eall
S

***********************************************************
** written by write_step_end function
*END STEP

***********************************************************
** CalculiX Input file
** written by write_footer function
**   written by    --> FreeCAD 0.17.13541 (Git)
**   written on    --> Mon Apr 08 22:08:56 2019
**   file name     -->
**   analysis name --> Analysis
**
**
**
**   Units
**
**   Geometry (mesh data)        --> mm
**   Materials (Young's modulus) --> N/mm2 = MPa
**   Loads (nodal loads)         --> N
**
