*Heading
** Simple test file with triangular elements (CPS3)
** 2D cantilever beam meshed with triangles

*Node, NSET=Nall
1, 0.0, 0.0
2, 10.0, 0.0
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*Element, TYPE=CPS3, ELSET=Eall
1, 1, 2, 8
2, 2, 9, 8
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*MATERIAL, NAME=Steel
*ELASTIC
210000.0, 0.3
*NSET, NSET=fixed_support
1, 8, 15, 22, 29, 36
*NSET, NSET=loaded_node
42
*BOUNDARY
fixed_support, 1
fixed_support, 2
*CLOAD
42, 2, -1000.0
*End Step
